// SBML level 2 version 2

model reducedYeast_ECM()

  // Compartments:
  compartment compartment;

  // Species:
  species MAL_m_ in compartment = 1;
  species AKG_m_ in compartment = 1;
  species P2G_c_ in compartment = 1;
  species P3G_c_ in compartment = 1;
  species P13G_c_ in compartment = 1;
  species G15L_c_ in compartment = 1;
  species P6G_c_ in compartment = 1;
  species ACA_c_ in compartment = 1;
  species AC_c_ in compartment = 1;
  species ACCOA_c_ in compartment = 1;
  species ACCOA_m_ in compartment = 1;
  species ADP_c_ in compartment = 1;
  species GLC_c_ in compartment = 1;
  species G6P_c_ in compartment = 1;
  species ATP_c_ in compartment = 1;
  species AMP_c_ in compartment = 1;
  species F16P_c_ in compartment = 1;
  species F6P_c_ in compartment = 1;
  species BIOMASS_c_ in compartment = 1;
  species CI_m_ in compartment = 1;
  species CO2_c_ in compartment = 1;
  species CO2_m_ in compartment = 1;
  species COA_c_ in compartment = 1;
  species COA_m_ in compartment = 1;
  species E4P_c_ in compartment = 1;
  species GA3P_c_ in compartment = 1;
  species R5P_c_ in compartment = 1;
  species RU5P_c_ in compartment = 1;
  species X5P_c_ in compartment = 1;
  species ETH_c_ in compartment = 1;
  species FUM_m_ in compartment = 1;
  species GP_c_ in compartment = 1;
  species GLY_c_ in compartment = 1;
  species DHAP_c_ in compartment = 1;
  species ICI_m_ in compartment = 1;
  species NAD_c_ in compartment = 1;
  species NAD_m_ in compartment = 1;
  species NADH_c_ in compartment = 1;
  species NADH_m_ in compartment = 1;
  species NADP_c_ in compartment = 1;
  species NADP_m_ in compartment = 1;
  species NADPH_c_ in compartment = 1;
  species NADPH_m_ in compartment = 1;
  species O2_c_ in compartment = 1;
  species OAA_m_ in compartment = 1;
  species PI_c_ in compartment = 1;
  species PEP_c_ in compartment = 1;
  species PYR_c_ in compartment = 1;
  species S7P_c_ in compartment = 1;
  species SUC_m_ in compartment = 1;
  species ubiquinone_6_m_ in compartment = 1;
  species ubiquinol_6_m_ in compartment = 1;
  species Ferricytochrome_c_m_ in compartment = 1;
  species Ferrocytochrome_c_m_ in compartment = 1;
  species H_m_ in compartment = 1;
  species H_i_ in compartment = 1;
  species growthProteinAlt_c_ in compartment = 1;
  species growthProtein_c_ in compartment = 1;
  species growthRNA_c_ in compartment = 1;
  species growthDNA_c_ in compartment = 1;
  species growthLipid_c_ in compartment = 1;
  species growthGlycogen_c_ in compartment = 1;
  species growthTrehalose_c_ in compartment = 1;
  species growthMannan_c_ in compartment = 1;
  species growthGlucan_c_ in compartment = 1;
  species growthMaintainance_c_ in compartment = 1;
  species ATP_m_ in compartment = 1;
  species ADP_m_ in compartment = 1;
  species PI_m_ in compartment = 1;
  species PYR_m_ in compartment = 1;
  species OAA_c_ in compartment = 1;
  species GAL_c_ in compartment = 1;
  species GALP_c_ in compartment = 1;
  species GALUDP_c_ in compartment = 1;
  species GLUUDP_c_ in compartment = 1;
  species G1P_c_ in compartment = 1;
  species Glyoxylate_m_ in compartment = 1;
  species Succinyl_CoA_m_ in compartment = 1;
  species H2O_m_ in compartment = 1;
  species H2O_c_ in compartment = 1;
  species HCO3_c_ in compartment = 1;

  // Reactions:
  GAL1: ATP_c_ + GAL_c_ -> ADP_c_ + GALP_c_; u_R1*(kC_R1*sqrt(kEQ_R1*kM_R1_ATP_c_*kM_R1_GAL_c_/kM_R1_ADP_c_/kM_R1_GALP_c_)*(ATP_c_/kM_R1_ATP_c_)*(GAL_c_/kM_R1_GAL_c_) - kC_R1/sqrt(kEQ_R1*kM_R1_ATP_c_*kM_R1_GAL_c_/kM_R1_ADP_c_/kM_R1_GALP_c_)*(ADP_c_/kM_R1_ADP_c_)*(GALP_c_/kM_R1_GALP_c_))/((1 + ATP_c_/kM_R1_ATP_c_)*(1 + GAL_c_/kM_R1_GAL_c_) + (1 + ADP_c_/kM_R1_ADP_c_)*(1 + GALP_c_/kM_R1_GALP_c_) - 1);
    u_R1 = 1; kC_R1 = 1; kEQ_R1 = 1; kM_R1_ADP_c_ = 1; kM_R1_ATP_c_ = 1; kM_R1_GAL_c_ = 1; kM_R1_GALP_c_ = 1;
  GAL10: GALUDP_c_ -> GLUUDP_c_; u_R2*(kC_R2*sqrt(kEQ_R2*kM_R2_GALUDP_c_/kM_R2_GLUUDP_c_)*(GALUDP_c_/kM_R2_GALUDP_c_) - kC_R2/sqrt(kEQ_R2*kM_R2_GALUDP_c_/kM_R2_GLUUDP_c_)*(GLUUDP_c_/kM_R2_GLUUDP_c_))/(1 + GALUDP_c_/kM_R2_GALUDP_c_ + 1 + GLUUDP_c_/kM_R2_GLUUDP_c_ - 1);
    u_R2 = 1; kC_R2 = 1; kEQ_R2 = 1; kM_R2_GALUDP_c_ = 1; kM_R2_GLUUDP_c_ = 1;
  GAL7b: GALP_c_ + GLUUDP_c_ -> GALUDP_c_ + G1P_c_; u_R3*(kC_R3*sqrt(kEQ_R3*kM_R3_GALP_c_*kM_R3_GLUUDP_c_/kM_R3_GALUDP_c_/kM_R3_G1P_c_)*(GALP_c_/kM_R3_GALP_c_)*(GLUUDP_c_/kM_R3_GLUUDP_c_) - kC_R3/sqrt(kEQ_R3*kM_R3_GALP_c_*kM_R3_GLUUDP_c_/kM_R3_GALUDP_c_/kM_R3_G1P_c_)*(GALUDP_c_/kM_R3_GALUDP_c_)*(G1P_c_/kM_R3_G1P_c_))/((1 + GALP_c_/kM_R3_GALP_c_)*(1 + GLUUDP_c_/kM_R3_GLUUDP_c_) + (1 + GALUDP_c_/kM_R3_GALUDP_c_)*(1 + G1P_c_/kM_R3_G1P_c_) - 1);
    u_R3 = 1; kC_R3 = 1; kEQ_R3 = 1; kM_R3_GALP_c_ = 1; kM_R3_GALUDP_c_ = 1; kM_R3_GLUUDP_c_ = 1; kM_R3_G1P_c_ = 1;
  PGM1_2: G1P_c_ -> G6P_c_; u_R4*(kC_R4*sqrt(kEQ_R4*kM_R4_G1P_c_/kM_R4_G6P_c_)*(G1P_c_/kM_R4_G1P_c_) - kC_R4/sqrt(kEQ_R4*kM_R4_G1P_c_/kM_R4_G6P_c_)*(G6P_c_/kM_R4_G6P_c_))/(1 + G1P_c_/kM_R4_G1P_c_ + 1 + G6P_c_/kM_R4_G6P_c_ - 1);
    u_R4 = 1; kC_R4 = 1; kEQ_R4 = 1; kM_R4_G6P_c_ = 1; kM_R4_G1P_c_ = 1;
  HXK: GLC_c_ + ATP_c_ -> ADP_c_ + G6P_c_; u_R5*(kC_R5*sqrt(kEQ_R5*kM_R5_GLC_c_*kM_R5_ATP_c_/kM_R5_ADP_c_/kM_R5_G6P_c_)*(GLC_c_/kM_R5_GLC_c_)*(ATP_c_/kM_R5_ATP_c_) - kC_R5/sqrt(kEQ_R5*kM_R5_GLC_c_*kM_R5_ATP_c_/kM_R5_ADP_c_/kM_R5_G6P_c_)*(ADP_c_/kM_R5_ADP_c_)*(G6P_c_/kM_R5_G6P_c_))/((1 + GLC_c_/kM_R5_GLC_c_)*(1 + ATP_c_/kM_R5_ATP_c_) + (1 + ADP_c_/kM_R5_ADP_c_)*(1 + G6P_c_/kM_R5_G6P_c_) - 1);
    u_R5 = 1; kC_R5 = 1; kEQ_R5 = 1; kM_R5_ADP_c_ = 1; kM_R5_GLC_c_ = 1; kM_R5_G6P_c_ = 1; kM_R5_ATP_c_ = 1;
  PGI: G6P_c_ -> F6P_c_; u_R6*(kC_R6*sqrt(kEQ_R6*kM_R6_G6P_c_/kM_R6_F6P_c_)*(G6P_c_/kM_R6_G6P_c_) - kC_R6/sqrt(kEQ_R6*kM_R6_G6P_c_/kM_R6_F6P_c_)*(F6P_c_/kM_R6_F6P_c_))/(1 + G6P_c_/kM_R6_G6P_c_ + 1 + F6P_c_/kM_R6_F6P_c_ - 1);
    u_R6 = 1; kC_R6 = 1; kEQ_R6 = 1; kM_R6_G6P_c_ = 1; kM_R6_F6P_c_ = 1;
  PFK: ATP_c_ + F6P_c_ -> ADP_c_ + F16P_c_; u_R7*(kC_R7*sqrt(kEQ_R7*kM_R7_ATP_c_*kM_R7_F6P_c_/kM_R7_ADP_c_/kM_R7_F16P_c_)*(ATP_c_/kM_R7_ATP_c_)*(F6P_c_/kM_R7_F6P_c_) - kC_R7/sqrt(kEQ_R7*kM_R7_ATP_c_*kM_R7_F6P_c_/kM_R7_ADP_c_/kM_R7_F16P_c_)*(ADP_c_/kM_R7_ADP_c_)*(F16P_c_/kM_R7_F16P_c_))/((1 + ATP_c_/kM_R7_ATP_c_)*(1 + F6P_c_/kM_R7_F6P_c_) + (1 + ADP_c_/kM_R7_ADP_c_)*(1 + F16P_c_/kM_R7_F16P_c_) - 1);
    u_R7 = 1; kC_R7 = 1; kEQ_R7 = 1; kM_R7_ADP_c_ = 1; kM_R7_ATP_c_ = 1; kM_R7_F16P_c_ = 1; kM_R7_F6P_c_ = 1;
  FBP: F16P_c_ + H2O_c_ -> F6P_c_ + PI_c_; u_R8*(kC_R8*sqrt(kEQ_R8*kM_R8_F16P_c_*kM_R8_H2O_c_/kM_R8_F6P_c_/kM_R8_PI_c_)*(F16P_c_/kM_R8_F16P_c_)*(H2O_c_/kM_R8_H2O_c_) - kC_R8/sqrt(kEQ_R8*kM_R8_F16P_c_*kM_R8_H2O_c_/kM_R8_F6P_c_/kM_R8_PI_c_)*(F6P_c_/kM_R8_F6P_c_)*(PI_c_/kM_R8_PI_c_))/((1 + F16P_c_/kM_R8_F16P_c_)*(1 + H2O_c_/kM_R8_H2O_c_) + (1 + F6P_c_/kM_R8_F6P_c_)*(1 + PI_c_/kM_R8_PI_c_) - 1);
    u_R8 = 1; kC_R8 = 1; kEQ_R8 = 1; kM_R8_F16P_c_ = 1; kM_R8_F6P_c_ = 1; kM_R8_PI_c_ = 1; kM_R8_H2O_c_ = 1;
  FBA: F16P_c_ -> GA3P_c_ + DHAP_c_; u_R9*(kC_R9*sqrt(kEQ_R9*kM_R9_F16P_c_/kM_R9_GA3P_c_/kM_R9_DHAP_c_)*(F16P_c_/kM_R9_F16P_c_) - kC_R9/sqrt(kEQ_R9*kM_R9_F16P_c_/kM_R9_GA3P_c_/kM_R9_DHAP_c_)*(GA3P_c_/kM_R9_GA3P_c_)*(DHAP_c_/kM_R9_DHAP_c_))/(1 + F16P_c_/kM_R9_F16P_c_ + (1 + GA3P_c_/kM_R9_GA3P_c_)*(1 + DHAP_c_/kM_R9_DHAP_c_) - 1);
    u_R9 = 1; kC_R9 = 1; kEQ_R9 = 1; kM_R9_F16P_c_ = 1; kM_R9_GA3P_c_ = 1; kM_R9_DHAP_c_ = 1;
  TPI: DHAP_c_ -> GA3P_c_; u_R10*(kC_R10*sqrt(kEQ_R10*kM_R10_DHAP_c_/kM_R10_GA3P_c_)*(DHAP_c_/kM_R10_DHAP_c_) - kC_R10/sqrt(kEQ_R10*kM_R10_DHAP_c_/kM_R10_GA3P_c_)*(GA3P_c_/kM_R10_GA3P_c_))/(1 + DHAP_c_/kM_R10_DHAP_c_ + 1 + GA3P_c_/kM_R10_GA3P_c_ - 1);
    u_R10 = 1; kC_R10 = 1; kEQ_R10 = 1; kM_R10_GA3P_c_ = 1; kM_R10_DHAP_c_ = 1;
  GLD: GA3P_c_ + NAD_c_ + PI_c_ -> P13G_c_ + NADH_c_; u_R11*(kC_R11*sqrt(kEQ_R11*kM_R11_GA3P_c_*kM_R11_NAD_c_*kM_R11_PI_c_/kM_R11_P13G_c_/kM_R11_NADH_c_)*(GA3P_c_/kM_R11_GA3P_c_)*(NAD_c_/kM_R11_NAD_c_)*(PI_c_/kM_R11_PI_c_) - kC_R11/sqrt(kEQ_R11*kM_R11_GA3P_c_*kM_R11_NAD_c_*kM_R11_PI_c_/kM_R11_P13G_c_/kM_R11_NADH_c_)*(P13G_c_/kM_R11_P13G_c_)*(NADH_c_/kM_R11_NADH_c_))/((1 + GA3P_c_/kM_R11_GA3P_c_)*(1 + NAD_c_/kM_R11_NAD_c_)*(1 + PI_c_/kM_R11_PI_c_) + (1 + P13G_c_/kM_R11_P13G_c_)*(1 + NADH_c_/kM_R11_NADH_c_) - 1);
    u_R11 = 1; kC_R11 = 1; kEQ_R11 = 1; kM_R11_P13G_c_ = 1; kM_R11_GA3P_c_ = 1; kM_R11_NAD_c_ = 1; kM_R11_NADH_c_ = 1; kM_R11_PI_c_ = 1;
  PGK: P13G_c_ + ADP_c_ -> P3G_c_ + ATP_c_; u_R12*(kC_R12*sqrt(kEQ_R12*kM_R12_P13G_c_*kM_R12_ADP_c_/kM_R12_P3G_c_/kM_R12_ATP_c_)*(P13G_c_/kM_R12_P13G_c_)*(ADP_c_/kM_R12_ADP_c_) - kC_R12/sqrt(kEQ_R12*kM_R12_P13G_c_*kM_R12_ADP_c_/kM_R12_P3G_c_/kM_R12_ATP_c_)*(P3G_c_/kM_R12_P3G_c_)*(ATP_c_/kM_R12_ATP_c_))/((1 + P13G_c_/kM_R12_P13G_c_)*(1 + ADP_c_/kM_R12_ADP_c_) + (1 + P3G_c_/kM_R12_P3G_c_)*(1 + ATP_c_/kM_R12_ATP_c_) - 1);
    u_R12 = 1; kC_R12 = 1; kEQ_R12 = 1; kM_R12_P3G_c_ = 1; kM_R12_P13G_c_ = 1; kM_R12_ADP_c_ = 1; kM_R12_ATP_c_ = 1;
  GPM: P3G_c_ -> P2G_c_; u_R13*(kC_R13*sqrt(kEQ_R13*kM_R13_P3G_c_/kM_R13_P2G_c_)*(P3G_c_/kM_R13_P3G_c_) - kC_R13/sqrt(kEQ_R13*kM_R13_P3G_c_/kM_R13_P2G_c_)*(P2G_c_/kM_R13_P2G_c_))/(1 + P3G_c_/kM_R13_P3G_c_ + 1 + P2G_c_/kM_R13_P2G_c_ - 1);
    u_R13 = 1; kC_R13 = 1; kEQ_R13 = 1; kM_R13_P2G_c_ = 1; kM_R13_P3G_c_ = 1;
  ENO: P2G_c_ -> PEP_c_ + H2O_c_; u_R14*(kC_R14*sqrt(kEQ_R14*kM_R14_P2G_c_/kM_R14_PEP_c_/kM_R14_H2O_c_)*(P2G_c_/kM_R14_P2G_c_) - kC_R14/sqrt(kEQ_R14*kM_R14_P2G_c_/kM_R14_PEP_c_/kM_R14_H2O_c_)*(PEP_c_/kM_R14_PEP_c_)*(H2O_c_/kM_R14_H2O_c_))/(1 + P2G_c_/kM_R14_P2G_c_ + (1 + PEP_c_/kM_R14_PEP_c_)*(1 + H2O_c_/kM_R14_H2O_c_) - 1);
    u_R14 = 1; kC_R14 = 1; kEQ_R14 = 1; kM_R14_P2G_c_ = 1; kM_R14_PEP_c_ = 1; kM_R14_H2O_c_ = 1;
  CDC: ADP_c_ + PEP_c_ -> ATP_c_ + PYR_c_; u_R15*(kC_R15*sqrt(kEQ_R15*kM_R15_ADP_c_*kM_R15_PEP_c_/kM_R15_ATP_c_/kM_R15_PYR_c_)*(ADP_c_/kM_R15_ADP_c_)*(PEP_c_/kM_R15_PEP_c_) - kC_R15/sqrt(kEQ_R15*kM_R15_ADP_c_*kM_R15_PEP_c_/kM_R15_ATP_c_/kM_R15_PYR_c_)*(ATP_c_/kM_R15_ATP_c_)*(PYR_c_/kM_R15_PYR_c_))/((1 + ADP_c_/kM_R15_ADP_c_)*(1 + PEP_c_/kM_R15_PEP_c_) + (1 + ATP_c_/kM_R15_ATP_c_)*(1 + PYR_c_/kM_R15_PYR_c_) - 1);
    u_R15 = 1; kC_R15 = 1; kEQ_R15 = 1; kM_R15_ADP_c_ = 1; kM_R15_ATP_c_ = 1; kM_R15_PEP_c_ = 1; kM_R15_PYR_c_ = 1;
  ZWF: G6P_c_ + NADP_c_ -> G15L_c_ + NADPH_c_; u_R16*(kC_R16*sqrt(kEQ_R16*kM_R16_G6P_c_*kM_R16_NADP_c_/kM_R16_G15L_c_/kM_R16_NADPH_c_)*(G6P_c_/kM_R16_G6P_c_)*(NADP_c_/kM_R16_NADP_c_) - kC_R16/sqrt(kEQ_R16*kM_R16_G6P_c_*kM_R16_NADP_c_/kM_R16_G15L_c_/kM_R16_NADPH_c_)*(G15L_c_/kM_R16_G15L_c_)*(NADPH_c_/kM_R16_NADPH_c_))/((1 + G6P_c_/kM_R16_G6P_c_)*(1 + NADP_c_/kM_R16_NADP_c_) + (1 + G15L_c_/kM_R16_G15L_c_)*(1 + NADPH_c_/kM_R16_NADPH_c_) - 1);
    u_R16 = 1; kC_R16 = 1; kEQ_R16 = 1; kM_R16_G15L_c_ = 1; kM_R16_G6P_c_ = 1; kM_R16_NADP_c_ = 1; kM_R16_NADPH_c_ = 1;
  PGL: G15L_c_ + H2O_c_ -> P6G_c_; u_R17*(kC_R17*sqrt(kEQ_R17*kM_R17_G15L_c_*kM_R17_H2O_c_/kM_R17_P6G_c_)*(G15L_c_/kM_R17_G15L_c_)*(H2O_c_/kM_R17_H2O_c_) - kC_R17/sqrt(kEQ_R17*kM_R17_G15L_c_*kM_R17_H2O_c_/kM_R17_P6G_c_)*(P6G_c_/kM_R17_P6G_c_))/((1 + G15L_c_/kM_R17_G15L_c_)*(1 + H2O_c_/kM_R17_H2O_c_) + 1 + P6G_c_/kM_R17_P6G_c_ - 1);
    u_R17 = 1; kC_R17 = 1; kEQ_R17 = 1; kM_R17_G15L_c_ = 1; kM_R17_P6G_c_ = 1; kM_R17_H2O_c_ = 1;
  GND: P6G_c_ + NADP_c_ -> CO2_c_ + RU5P_c_ + NADPH_c_; u_R18*(kC_R18*sqrt(kEQ_R18*kM_R18_P6G_c_*kM_R18_NADP_c_/kM_R18_CO2_c_/kM_R18_RU5P_c_/kM_R18_NADPH_c_)*(P6G_c_/kM_R18_P6G_c_)*(NADP_c_/kM_R18_NADP_c_) - kC_R18/sqrt(kEQ_R18*kM_R18_P6G_c_*kM_R18_NADP_c_/kM_R18_CO2_c_/kM_R18_RU5P_c_/kM_R18_NADPH_c_)*(CO2_c_/kM_R18_CO2_c_)*(RU5P_c_/kM_R18_RU5P_c_)*(NADPH_c_/kM_R18_NADPH_c_))/((1 + P6G_c_/kM_R18_P6G_c_)*(1 + NADP_c_/kM_R18_NADP_c_) + (1 + CO2_c_/kM_R18_CO2_c_)*(1 + RU5P_c_/kM_R18_RU5P_c_)*(1 + NADPH_c_/kM_R18_NADPH_c_) - 1);
    u_R18 = 1; kC_R18 = 1; kEQ_R18 = 1; kM_R18_P6G_c_ = 1; kM_R18_CO2_c_ = 1; kM_R18_RU5P_c_ = 1; kM_R18_NADP_c_ = 1; kM_R18_NADPH_c_ = 1;
  RPI: RU5P_c_ -> R5P_c_; u_R19*(kC_R19*sqrt(kEQ_R19*kM_R19_RU5P_c_/kM_R19_R5P_c_)*(RU5P_c_/kM_R19_RU5P_c_) - kC_R19/sqrt(kEQ_R19*kM_R19_RU5P_c_/kM_R19_R5P_c_)*(R5P_c_/kM_R19_R5P_c_))/(1 + RU5P_c_/kM_R19_RU5P_c_ + 1 + R5P_c_/kM_R19_R5P_c_ - 1);
    u_R19 = 1; kC_R19 = 1; kEQ_R19 = 1; kM_R19_R5P_c_ = 1; kM_R19_RU5P_c_ = 1;
  RPE: RU5P_c_ -> X5P_c_; u_R20*(kC_R20*sqrt(kEQ_R20*kM_R20_RU5P_c_/kM_R20_X5P_c_)*(RU5P_c_/kM_R20_RU5P_c_) - kC_R20/sqrt(kEQ_R20*kM_R20_RU5P_c_/kM_R20_X5P_c_)*(X5P_c_/kM_R20_X5P_c_))/(1 + RU5P_c_/kM_R20_RU5P_c_ + 1 + X5P_c_/kM_R20_X5P_c_ - 1);
    u_R20 = 1; kC_R20 = 1; kEQ_R20 = 1; kM_R20_RU5P_c_ = 1; kM_R20_X5P_c_ = 1;
  TKLa: R5P_c_ + X5P_c_ -> GA3P_c_ + S7P_c_; u_R21*(kC_R21*sqrt(kEQ_R21*kM_R21_R5P_c_*kM_R21_X5P_c_/kM_R21_GA3P_c_/kM_R21_S7P_c_)*(R5P_c_/kM_R21_R5P_c_)*(X5P_c_/kM_R21_X5P_c_) - kC_R21/sqrt(kEQ_R21*kM_R21_R5P_c_*kM_R21_X5P_c_/kM_R21_GA3P_c_/kM_R21_S7P_c_)*(GA3P_c_/kM_R21_GA3P_c_)*(S7P_c_/kM_R21_S7P_c_))/((1 + R5P_c_/kM_R21_R5P_c_)*(1 + X5P_c_/kM_R21_X5P_c_) + (1 + GA3P_c_/kM_R21_GA3P_c_)*(1 + S7P_c_/kM_R21_S7P_c_) - 1);
    u_R21 = 1; kC_R21 = 1; kEQ_R21 = 1; kM_R21_GA3P_c_ = 1; kM_R21_R5P_c_ = 1; kM_R21_X5P_c_ = 1; kM_R21_S7P_c_ = 1;
  TAL1: GA3P_c_ + S7P_c_ -> F6P_c_ + E4P_c_; u_R22*(kC_R22*sqrt(kEQ_R22*kM_R22_GA3P_c_*kM_R22_S7P_c_/kM_R22_F6P_c_/kM_R22_E4P_c_)*(GA3P_c_/kM_R22_GA3P_c_)*(S7P_c_/kM_R22_S7P_c_) - kC_R22/sqrt(kEQ_R22*kM_R22_GA3P_c_*kM_R22_S7P_c_/kM_R22_F6P_c_/kM_R22_E4P_c_)*(F6P_c_/kM_R22_F6P_c_)*(E4P_c_/kM_R22_E4P_c_))/((1 + GA3P_c_/kM_R22_GA3P_c_)*(1 + S7P_c_/kM_R22_S7P_c_) + (1 + F6P_c_/kM_R22_F6P_c_)*(1 + E4P_c_/kM_R22_E4P_c_) - 1);
    u_R22 = 1; kC_R22 = 1; kEQ_R22 = 1; kM_R22_F6P_c_ = 1; kM_R22_E4P_c_ = 1; kM_R22_GA3P_c_ = 1; kM_R22_S7P_c_ = 1;
  TKLb: E4P_c_ + X5P_c_ -> F6P_c_ + GA3P_c_; u_R23*(kC_R23*sqrt(kEQ_R23*kM_R23_E4P_c_*kM_R23_X5P_c_/kM_R23_F6P_c_/kM_R23_GA3P_c_)*(E4P_c_/kM_R23_E4P_c_)*(X5P_c_/kM_R23_X5P_c_) - kC_R23/sqrt(kEQ_R23*kM_R23_E4P_c_*kM_R23_X5P_c_/kM_R23_F6P_c_/kM_R23_GA3P_c_)*(F6P_c_/kM_R23_F6P_c_)*(GA3P_c_/kM_R23_GA3P_c_))/((1 + E4P_c_/kM_R23_E4P_c_)*(1 + X5P_c_/kM_R23_X5P_c_) + (1 + F6P_c_/kM_R23_F6P_c_)*(1 + GA3P_c_/kM_R23_GA3P_c_) - 1);
    u_R23 = 1; kC_R23 = 1; kEQ_R23 = 1; kM_R23_F6P_c_ = 1; kM_R23_E4P_c_ = 1; kM_R23_GA3P_c_ = 1; kM_R23_X5P_c_ = 1;
  DAR: DHAP_c_ + NADH_c_ -> GP_c_ + NAD_c_; u_R24*(kC_R24*sqrt(kEQ_R24*kM_R24_DHAP_c_*kM_R24_NADH_c_/kM_R24_GP_c_/kM_R24_NAD_c_)*(DHAP_c_/kM_R24_DHAP_c_)*(NADH_c_/kM_R24_NADH_c_) - kC_R24/sqrt(kEQ_R24*kM_R24_DHAP_c_*kM_R24_NADH_c_/kM_R24_GP_c_/kM_R24_NAD_c_)*(GP_c_/kM_R24_GP_c_)*(NAD_c_/kM_R24_NAD_c_))/((1 + DHAP_c_/kM_R24_DHAP_c_)*(1 + NADH_c_/kM_R24_NADH_c_) + (1 + GP_c_/kM_R24_GP_c_)*(1 + NAD_c_/kM_R24_NAD_c_) - 1);
    u_R24 = 1; kC_R24 = 1; kEQ_R24 = 1; kM_R24_GP_c_ = 1; kM_R24_DHAP_c_ = 1; kM_R24_NAD_c_ = 1; kM_R24_NADH_c_ = 1;
  GPP: GP_c_ + H2O_c_ -> GLY_c_ + PI_c_; u_R25*(kC_R25*sqrt(kEQ_R25*kM_R25_GP_c_*kM_R25_H2O_c_/kM_R25_GLY_c_/kM_R25_PI_c_)*(GP_c_/kM_R25_GP_c_)*(H2O_c_/kM_R25_H2O_c_) - kC_R25/sqrt(kEQ_R25*kM_R25_GP_c_*kM_R25_H2O_c_/kM_R25_GLY_c_/kM_R25_PI_c_)*(GLY_c_/kM_R25_GLY_c_)*(PI_c_/kM_R25_PI_c_))/((1 + GP_c_/kM_R25_GP_c_)*(1 + H2O_c_/kM_R25_H2O_c_) + (1 + GLY_c_/kM_R25_GLY_c_)*(1 + PI_c_/kM_R25_PI_c_) - 1);
    u_R25 = 1; kC_R25 = 1; kEQ_R25 = 1; kM_R25_GP_c_ = 1; kM_R25_GLY_c_ = 1; kM_R25_PI_c_ = 1; kM_R25_H2O_c_ = 1;
  PDC: PYR_c_ -> ACA_c_ + CO2_c_; u_R26*(kC_R26*sqrt(kEQ_R26*kM_R26_PYR_c_/kM_R26_ACA_c_/kM_R26_CO2_c_)*(PYR_c_/kM_R26_PYR_c_) - kC_R26/sqrt(kEQ_R26*kM_R26_PYR_c_/kM_R26_ACA_c_/kM_R26_CO2_c_)*(ACA_c_/kM_R26_ACA_c_)*(CO2_c_/kM_R26_CO2_c_))/(1 + PYR_c_/kM_R26_PYR_c_ + (1 + ACA_c_/kM_R26_ACA_c_)*(1 + CO2_c_/kM_R26_CO2_c_) - 1);
    u_R26 = 1; kC_R26 = 1; kEQ_R26 = 1; kM_R26_ACA_c_ = 1; kM_R26_CO2_c_ = 1; kM_R26_PYR_c_ = 1;
  ADH1: ACA_c_ + NADH_c_ -> ETH_c_ + NAD_c_; u_R27*(kC_R27*sqrt(kEQ_R27*kM_R27_ACA_c_*kM_R27_NADH_c_/kM_R27_ETH_c_/kM_R27_NAD_c_)*(ACA_c_/kM_R27_ACA_c_)*(NADH_c_/kM_R27_NADH_c_) - kC_R27/sqrt(kEQ_R27*kM_R27_ACA_c_*kM_R27_NADH_c_/kM_R27_ETH_c_/kM_R27_NAD_c_)*(ETH_c_/kM_R27_ETH_c_)*(NAD_c_/kM_R27_NAD_c_))/((1 + ACA_c_/kM_R27_ACA_c_)*(1 + NADH_c_/kM_R27_NADH_c_) + (1 + ETH_c_/kM_R27_ETH_c_)*(1 + NAD_c_/kM_R27_NAD_c_) - 1);
    u_R27 = 1; kC_R27 = 1; kEQ_R27 = 1; kM_R27_ACA_c_ = 1; kM_R27_ETH_c_ = 1; kM_R27_NAD_c_ = 1; kM_R27_NADH_c_ = 1;
  ALD6: ACA_c_ + NADP_c_ + H2O_c_ -> AC_c_ + NADPH_c_; u_R28*(kC_R28*sqrt(kEQ_R28*kM_R28_ACA_c_*kM_R28_NADP_c_*kM_R28_H2O_c_/kM_R28_AC_c_/kM_R28_NADPH_c_)*(ACA_c_/kM_R28_ACA_c_)*(NADP_c_/kM_R28_NADP_c_)*(H2O_c_/kM_R28_H2O_c_) - kC_R28/sqrt(kEQ_R28*kM_R28_ACA_c_*kM_R28_NADP_c_*kM_R28_H2O_c_/kM_R28_AC_c_/kM_R28_NADPH_c_)*(AC_c_/kM_R28_AC_c_)*(NADPH_c_/kM_R28_NADPH_c_))/((1 + ACA_c_/kM_R28_ACA_c_)*(1 + NADP_c_/kM_R28_NADP_c_)*(1 + H2O_c_/kM_R28_H2O_c_) + (1 + AC_c_/kM_R28_AC_c_)*(1 + NADPH_c_/kM_R28_NADPH_c_) - 1);
    u_R28 = 1; kC_R28 = 1; kEQ_R28 = 1; kM_R28_ACA_c_ = 1; kM_R28_AC_c_ = 1; kM_R28_NADP_c_ = 1; kM_R28_NADPH_c_ = 1; kM_R28_H2O_c_ = 1;
  ALD2: ACA_c_ + NAD_c_ + H2O_c_ -> AC_c_ + NADH_c_; u_R29*(kC_R29*sqrt(kEQ_R29*kM_R29_ACA_c_*kM_R29_NAD_c_*kM_R29_H2O_c_/kM_R29_AC_c_/kM_R29_NADH_c_)*(ACA_c_/kM_R29_ACA_c_)*(NAD_c_/kM_R29_NAD_c_)*(H2O_c_/kM_R29_H2O_c_) - kC_R29/sqrt(kEQ_R29*kM_R29_ACA_c_*kM_R29_NAD_c_*kM_R29_H2O_c_/kM_R29_AC_c_/kM_R29_NADH_c_)*(AC_c_/kM_R29_AC_c_)*(NADH_c_/kM_R29_NADH_c_))/((1 + ACA_c_/kM_R29_ACA_c_)*(1 + NAD_c_/kM_R29_NAD_c_)*(1 + H2O_c_/kM_R29_H2O_c_) + (1 + AC_c_/kM_R29_AC_c_)*(1 + NADH_c_/kM_R29_NADH_c_) - 1);
    u_R29 = 1; kC_R29 = 1; kEQ_R29 = 1; kM_R29_ACA_c_ = 1; kM_R29_AC_c_ = 1; kM_R29_NAD_c_ = 1; kM_R29_NADH_c_ = 1; kM_R29_H2O_c_ = 1;
  ICL1: ICI_m_ -> SUC_m_ + Glyoxylate_m_; u_R30*(kC_R30*sqrt(kEQ_R30*kM_R30_ICI_m_/kM_R30_SUC_m_/kM_R30_Glyoxylate_m_)*(ICI_m_/kM_R30_ICI_m_) - kC_R30/sqrt(kEQ_R30*kM_R30_ICI_m_/kM_R30_SUC_m_/kM_R30_Glyoxylate_m_)*(SUC_m_/kM_R30_SUC_m_)*(Glyoxylate_m_/kM_R30_Glyoxylate_m_))/(1 + ICI_m_/kM_R30_ICI_m_ + (1 + SUC_m_/kM_R30_SUC_m_)*(1 + Glyoxylate_m_/kM_R30_Glyoxylate_m_) - 1);
    u_R30 = 1; kC_R30 = 1; kEQ_R30 = 1; kM_R30_ICI_m_ = 1; kM_R30_SUC_m_ = 1; kM_R30_Glyoxylate_m_ = 1;
  MLS1: ACCOA_m_ + Glyoxylate_m_ + H2O_m_ -> MAL_m_ + COA_m_; u_R31*(kC_R31*sqrt(kEQ_R31*kM_R31_ACCOA_m_*kM_R31_Glyoxylate_m_*kM_R31_H2O_m_/kM_R31_MAL_m_/kM_R31_COA_m_)*(ACCOA_m_/kM_R31_ACCOA_m_)*(Glyoxylate_m_/kM_R31_Glyoxylate_m_)*(H2O_m_/kM_R31_H2O_m_) - kC_R31/sqrt(kEQ_R31*kM_R31_ACCOA_m_*kM_R31_Glyoxylate_m_*kM_R31_H2O_m_/kM_R31_MAL_m_/kM_R31_COA_m_)*(MAL_m_/kM_R31_MAL_m_)*(COA_m_/kM_R31_COA_m_))/((1 + ACCOA_m_/kM_R31_ACCOA_m_)*(1 + Glyoxylate_m_/kM_R31_Glyoxylate_m_)*(1 + H2O_m_/kM_R31_H2O_m_) + (1 + MAL_m_/kM_R31_MAL_m_)*(1 + COA_m_/kM_R31_COA_m_) - 1);
    u_R31 = 1; kC_R31 = 1; kEQ_R31 = 1; kM_R31_MAL_m_ = 1; kM_R31_ACCOA_m_ = 1; kM_R31_COA_m_ = 1; kM_R31_Glyoxylate_m_ = 1; kM_R31_H2O_m_ = 1;
  PDH: COA_m_ + NAD_m_ + PYR_m_ -> ACCOA_m_ + CO2_m_ + NADH_m_; u_R32*(kC_R32*sqrt(kEQ_R32*kM_R32_COA_m_*kM_R32_NAD_m_*kM_R32_PYR_m_/kM_R32_ACCOA_m_/kM_R32_CO2_m_/kM_R32_NADH_m_)*(COA_m_/kM_R32_COA_m_)*(NAD_m_/kM_R32_NAD_m_)*(PYR_m_/kM_R32_PYR_m_) - kC_R32/sqrt(kEQ_R32*kM_R32_COA_m_*kM_R32_NAD_m_*kM_R32_PYR_m_/kM_R32_ACCOA_m_/kM_R32_CO2_m_/kM_R32_NADH_m_)*(ACCOA_m_/kM_R32_ACCOA_m_)*(CO2_m_/kM_R32_CO2_m_)*(NADH_m_/kM_R32_NADH_m_))/((1 + COA_m_/kM_R32_COA_m_)*(1 + NAD_m_/kM_R32_NAD_m_)*(1 + PYR_m_/kM_R32_PYR_m_) + (1 + ACCOA_m_/kM_R32_ACCOA_m_)*(1 + CO2_m_/kM_R32_CO2_m_)*(1 + NADH_m_/kM_R32_NADH_m_) - 1);
    u_R32 = 1; kC_R32 = 1; kEQ_R32 = 1; kM_R32_ACCOA_m_ = 1; kM_R32_CO2_m_ = 1; kM_R32_COA_m_ = 1; kM_R32_NAD_m_ = 1; kM_R32_NADH_m_ = 1; kM_R32_PYR_m_ = 1;
  ACS: AC_c_ + ATP_c_ + COA_c_ + H2O_c_ -> ACCOA_c_ + AMP_c_ + 2 PI_c_; u_R33*(kC_R33*sqrt(kEQ_R33*kM_R33_AC_c_*kM_R33_ATP_c_*kM_R33_COA_c_*kM_R33_H2O_c_/kM_R33_ACCOA_c_/kM_R33_AMP_c_/kM_R33_PI_c_^2)*(AC_c_/kM_R33_AC_c_)*(ATP_c_/kM_R33_ATP_c_)*(COA_c_/kM_R33_COA_c_)*(H2O_c_/kM_R33_H2O_c_) - kC_R33/sqrt(kEQ_R33*kM_R33_AC_c_*kM_R33_ATP_c_*kM_R33_COA_c_*kM_R33_H2O_c_/kM_R33_ACCOA_c_/kM_R33_AMP_c_/kM_R33_PI_c_^2)*(ACCOA_c_/kM_R33_ACCOA_c_)*(AMP_c_/kM_R33_AMP_c_)*(PI_c_/kM_R33_PI_c_)^2)/((1 + AC_c_/kM_R33_AC_c_)*(1 + ATP_c_/kM_R33_ATP_c_)*(1 + COA_c_/kM_R33_COA_c_)*(1 + H2O_c_/kM_R33_H2O_c_) + (1 + ACCOA_c_/kM_R33_ACCOA_c_)*(1 + AMP_c_/kM_R33_AMP_c_)*(1 + PI_c_/kM_R33_PI_c_)^2 - 1);
    u_R33 = 1; kC_R33 = 1; kEQ_R33 = 1; kM_R33_AC_c_ = 1; kM_R33_ACCOA_c_ = 1; kM_R33_ATP_c_ = 1; kM_R33_AMP_c_ = 1; kM_R33_COA_c_ = 1; kM_R33_PI_c_ = 1; kM_R33_H2O_c_ = 1;
  ADK1_1: ATP_c_ + AMP_c_ -> 2 ADP_c_; u_R34*(kC_R34*sqrt(kEQ_R34*kM_R34_ATP_c_*kM_R34_AMP_c_/kM_R34_ADP_c_^2)*(ATP_c_/kM_R34_ATP_c_)*(AMP_c_/kM_R34_AMP_c_) - kC_R34/sqrt(kEQ_R34*kM_R34_ATP_c_*kM_R34_AMP_c_/kM_R34_ADP_c_^2)*(ADP_c_/kM_R34_ADP_c_)^2)/((1 + ATP_c_/kM_R34_ATP_c_)*(1 + AMP_c_/kM_R34_AMP_c_) + (1 + ADP_c_/kM_R34_ADP_c_)^2 - 1);
    u_R34 = 1; kC_R34 = 1; kEQ_R34 = 1; kM_R34_ADP_c_ = 1; kM_R34_ATP_c_ = 1; kM_R34_AMP_c_ = 1;
  PCK: ATP_c_ + OAA_c_ -> ADP_c_ + CO2_c_ + PEP_c_; u_R35*(kC_R35*sqrt(kEQ_R35*kM_R35_ATP_c_*kM_R35_OAA_c_/kM_R35_ADP_c_/kM_R35_CO2_c_/kM_R35_PEP_c_)*(ATP_c_/kM_R35_ATP_c_)*(OAA_c_/kM_R35_OAA_c_) - kC_R35/sqrt(kEQ_R35*kM_R35_ATP_c_*kM_R35_OAA_c_/kM_R35_ADP_c_/kM_R35_CO2_c_/kM_R35_PEP_c_)*(ADP_c_/kM_R35_ADP_c_)*(CO2_c_/kM_R35_CO2_c_)*(PEP_c_/kM_R35_PEP_c_))/((1 + ATP_c_/kM_R35_ATP_c_)*(1 + OAA_c_/kM_R35_OAA_c_) + (1 + ADP_c_/kM_R35_ADP_c_)*(1 + CO2_c_/kM_R35_CO2_c_)*(1 + PEP_c_/kM_R35_PEP_c_) - 1);
    u_R35 = 1; kC_R35 = 1; kEQ_R35 = 1; kM_R35_ADP_c_ = 1; kM_R35_ATP_c_ = 1; kM_R35_CO2_c_ = 1; kM_R35_PEP_c_ = 1; kM_R35_OAA_c_ = 1;
  PYC: ATP_c_ + PYR_c_ + HCO3_c_ -> ADP_c_ + PI_c_ + OAA_c_; u_R36*(kC_R36*sqrt(kEQ_R36*kM_R36_ATP_c_*kM_R36_PYR_c_*kM_R36_HCO3_c_/kM_R36_ADP_c_/kM_R36_PI_c_/kM_R36_OAA_c_)*(ATP_c_/kM_R36_ATP_c_)*(PYR_c_/kM_R36_PYR_c_)*(HCO3_c_/kM_R36_HCO3_c_) - kC_R36/sqrt(kEQ_R36*kM_R36_ATP_c_*kM_R36_PYR_c_*kM_R36_HCO3_c_/kM_R36_ADP_c_/kM_R36_PI_c_/kM_R36_OAA_c_)*(ADP_c_/kM_R36_ADP_c_)*(PI_c_/kM_R36_PI_c_)*(OAA_c_/kM_R36_OAA_c_))/((1 + ATP_c_/kM_R36_ATP_c_)*(1 + PYR_c_/kM_R36_PYR_c_)*(1 + HCO3_c_/kM_R36_HCO3_c_) + (1 + ADP_c_/kM_R36_ADP_c_)*(1 + PI_c_/kM_R36_PI_c_)*(1 + OAA_c_/kM_R36_OAA_c_) - 1);
    u_R36 = 1; kC_R36 = 1; kEQ_R36 = 1; kM_R36_ADP_c_ = 1; kM_R36_ATP_c_ = 1; kM_R36_PI_c_ = 1; kM_R36_PYR_c_ = 1; kM_R36_OAA_c_ = 1; kM_R36_HCO3_c_ = 1;
  CIT: ACCOA_m_ + OAA_m_ + H2O_m_ -> CI_m_ + COA_m_; u_R37*(kC_R37*sqrt(kEQ_R37*kM_R37_ACCOA_m_*kM_R37_OAA_m_*kM_R37_H2O_m_/kM_R37_CI_m_/kM_R37_COA_m_)*(ACCOA_m_/kM_R37_ACCOA_m_)*(OAA_m_/kM_R37_OAA_m_)*(H2O_m_/kM_R37_H2O_m_) - kC_R37/sqrt(kEQ_R37*kM_R37_ACCOA_m_*kM_R37_OAA_m_*kM_R37_H2O_m_/kM_R37_CI_m_/kM_R37_COA_m_)*(CI_m_/kM_R37_CI_m_)*(COA_m_/kM_R37_COA_m_))/((1 + ACCOA_m_/kM_R37_ACCOA_m_)*(1 + OAA_m_/kM_R37_OAA_m_)*(1 + H2O_m_/kM_R37_H2O_m_) + (1 + CI_m_/kM_R37_CI_m_)*(1 + COA_m_/kM_R37_COA_m_) - 1);
    u_R37 = 1; kC_R37 = 1; kEQ_R37 = 1; kM_R37_ACCOA_m_ = 1; kM_R37_CI_m_ = 1; kM_R37_COA_m_ = 1; kM_R37_OAA_m_ = 1; kM_R37_H2O_m_ = 1;
  ACO: CI_m_ -> ICI_m_; u_R38*(kC_R38*sqrt(kEQ_R38*kM_R38_CI_m_/kM_R38_ICI_m_)*(CI_m_/kM_R38_CI_m_) - kC_R38/sqrt(kEQ_R38*kM_R38_CI_m_/kM_R38_ICI_m_)*(ICI_m_/kM_R38_ICI_m_))/(1 + CI_m_/kM_R38_CI_m_ + 1 + ICI_m_/kM_R38_ICI_m_ - 1);
    u_R38 = 1; kC_R38 = 1; kEQ_R38 = 1; kM_R38_CI_m_ = 1; kM_R38_ICI_m_ = 1;
  IDH: ICI_m_ + NAD_m_ -> AKG_m_ + CO2_m_ + NADH_m_; u_R39*(kC_R39*sqrt(kEQ_R39*kM_R39_ICI_m_*kM_R39_NAD_m_/kM_R39_AKG_m_/kM_R39_CO2_m_/kM_R39_NADH_m_)*(ICI_m_/kM_R39_ICI_m_)*(NAD_m_/kM_R39_NAD_m_) - kC_R39/sqrt(kEQ_R39*kM_R39_ICI_m_*kM_R39_NAD_m_/kM_R39_AKG_m_/kM_R39_CO2_m_/kM_R39_NADH_m_)*(AKG_m_/kM_R39_AKG_m_)*(CO2_m_/kM_R39_CO2_m_)*(NADH_m_/kM_R39_NADH_m_))/((1 + ICI_m_/kM_R39_ICI_m_)*(1 + NAD_m_/kM_R39_NAD_m_) + (1 + AKG_m_/kM_R39_AKG_m_)*(1 + CO2_m_/kM_R39_CO2_m_)*(1 + NADH_m_/kM_R39_NADH_m_) - 1);
    u_R39 = 1; kC_R39 = 1; kEQ_R39 = 1; kM_R39_AKG_m_ = 1; kM_R39_CO2_m_ = 1; kM_R39_ICI_m_ = 1; kM_R39_NAD_m_ = 1; kM_R39_NADH_m_ = 1;
  IDPH: ICI_m_ + NADP_m_ -> AKG_m_ + CO2_m_ + NADPH_m_; u_R40*(kC_R40*sqrt(kEQ_R40*kM_R40_ICI_m_*kM_R40_NADP_m_/kM_R40_AKG_m_/kM_R40_CO2_m_/kM_R40_NADPH_m_)*(ICI_m_/kM_R40_ICI_m_)*(NADP_m_/kM_R40_NADP_m_) - kC_R40/sqrt(kEQ_R40*kM_R40_ICI_m_*kM_R40_NADP_m_/kM_R40_AKG_m_/kM_R40_CO2_m_/kM_R40_NADPH_m_)*(AKG_m_/kM_R40_AKG_m_)*(CO2_m_/kM_R40_CO2_m_)*(NADPH_m_/kM_R40_NADPH_m_))/((1 + ICI_m_/kM_R40_ICI_m_)*(1 + NADP_m_/kM_R40_NADP_m_) + (1 + AKG_m_/kM_R40_AKG_m_)*(1 + CO2_m_/kM_R40_CO2_m_)*(1 + NADPH_m_/kM_R40_NADPH_m_) - 1);
    u_R40 = 1; kC_R40 = 1; kEQ_R40 = 1; kM_R40_AKG_m_ = 1; kM_R40_CO2_m_ = 1; kM_R40_ICI_m_ = 1; kM_R40_NADP_m_ = 1; kM_R40_NADPH_m_ = 1;
  KGD1: AKG_m_ + COA_m_ + NAD_m_ -> CO2_m_ + NADH_m_ + Succinyl_CoA_m_; u_R41*(kC_R41*sqrt(kEQ_R41*kM_R41_AKG_m_*kM_R41_COA_m_*kM_R41_NAD_m_/kM_R41_CO2_m_/kM_R41_NADH_m_/kM_R41_Succinyl_CoA_m_)*(AKG_m_/kM_R41_AKG_m_)*(COA_m_/kM_R41_COA_m_)*(NAD_m_/kM_R41_NAD_m_) - kC_R41/sqrt(kEQ_R41*kM_R41_AKG_m_*kM_R41_COA_m_*kM_R41_NAD_m_/kM_R41_CO2_m_/kM_R41_NADH_m_/kM_R41_Succinyl_CoA_m_)*(CO2_m_/kM_R41_CO2_m_)*(NADH_m_/kM_R41_NADH_m_)*(Succinyl_CoA_m_/kM_R41_Succinyl_CoA_m_))/((1 + AKG_m_/kM_R41_AKG_m_)*(1 + COA_m_/kM_R41_COA_m_)*(1 + NAD_m_/kM_R41_NAD_m_) + (1 + CO2_m_/kM_R41_CO2_m_)*(1 + NADH_m_/kM_R41_NADH_m_)*(1 + Succinyl_CoA_m_/kM_R41_Succinyl_CoA_m_) - 1);
    u_R41 = 1; kC_R41 = 1; kEQ_R41 = 1; kM_R41_AKG_m_ = 1; kM_R41_CO2_m_ = 1; kM_R41_COA_m_ = 1; kM_R41_NAD_m_ = 1; kM_R41_NADH_m_ = 1; kM_R41_Succinyl_CoA_m_ = 1;
  LSC2: ADP_m_ + PI_m_ + Succinyl_CoA_m_ -> COA_m_ + SUC_m_ + ATP_m_; u_R42*(kC_R42*sqrt(kEQ_R42*kM_R42_ADP_m_*kM_R42_PI_m_*kM_R42_Succinyl_CoA_m_/kM_R42_COA_m_/kM_R42_SUC_m_/kM_R42_ATP_m_)*(ADP_m_/kM_R42_ADP_m_)*(PI_m_/kM_R42_PI_m_)*(Succinyl_CoA_m_/kM_R42_Succinyl_CoA_m_) - kC_R42/sqrt(kEQ_R42*kM_R42_ADP_m_*kM_R42_PI_m_*kM_R42_Succinyl_CoA_m_/kM_R42_COA_m_/kM_R42_SUC_m_/kM_R42_ATP_m_)*(COA_m_/kM_R42_COA_m_)*(SUC_m_/kM_R42_SUC_m_)*(ATP_m_/kM_R42_ATP_m_))/((1 + ADP_m_/kM_R42_ADP_m_)*(1 + PI_m_/kM_R42_PI_m_)*(1 + Succinyl_CoA_m_/kM_R42_Succinyl_CoA_m_) + (1 + COA_m_/kM_R42_COA_m_)*(1 + SUC_m_/kM_R42_SUC_m_)*(1 + ATP_m_/kM_R42_ATP_m_) - 1);
    u_R42 = 1; kC_R42 = 1; kEQ_R42 = 1; kM_R42_COA_m_ = 1; kM_R42_SUC_m_ = 1; kM_R42_ATP_m_ = 1; kM_R42_ADP_m_ = 1; kM_R42_PI_m_ = 1; kM_R42_Succinyl_CoA_m_ = 1;
  FUM1: FUM_m_ + H2O_m_ -> MAL_m_; u_R43*(kC_R43*sqrt(kEQ_R43*kM_R43_FUM_m_*kM_R43_H2O_m_/kM_R43_MAL_m_)*(FUM_m_/kM_R43_FUM_m_)*(H2O_m_/kM_R43_H2O_m_) - kC_R43/sqrt(kEQ_R43*kM_R43_FUM_m_*kM_R43_H2O_m_/kM_R43_MAL_m_)*(MAL_m_/kM_R43_MAL_m_))/((1 + FUM_m_/kM_R43_FUM_m_)*(1 + H2O_m_/kM_R43_H2O_m_) + 1 + MAL_m_/kM_R43_MAL_m_ - 1);
    u_R43 = 1; kC_R43 = 1; kEQ_R43 = 1; kM_R43_MAL_m_ = 1; kM_R43_FUM_m_ = 1; kM_R43_H2O_m_ = 1;
  MDH1: MAL_m_ + NAD_m_ -> NADH_m_ + OAA_m_; u_R44*(kC_R44*sqrt(kEQ_R44*kM_R44_MAL_m_*kM_R44_NAD_m_/kM_R44_NADH_m_/kM_R44_OAA_m_)*(MAL_m_/kM_R44_MAL_m_)*(NAD_m_/kM_R44_NAD_m_) - kC_R44/sqrt(kEQ_R44*kM_R44_MAL_m_*kM_R44_NAD_m_/kM_R44_NADH_m_/kM_R44_OAA_m_)*(NADH_m_/kM_R44_NADH_m_)*(OAA_m_/kM_R44_OAA_m_))/((1 + MAL_m_/kM_R44_MAL_m_)*(1 + NAD_m_/kM_R44_NAD_m_) + (1 + NADH_m_/kM_R44_NADH_m_)*(1 + OAA_m_/kM_R44_OAA_m_) - 1);
    u_R44 = 1; kC_R44 = 1; kEQ_R44 = 1; kM_R44_MAL_m_ = 1; kM_R44_NAD_m_ = 1; kM_R44_NADH_m_ = 1; kM_R44_OAA_m_ = 1;
  SDH: SUC_m_ + ubiquinone_6_m_ -> FUM_m_ + ubiquinol_6_m_; u_R45*(kC_R45*sqrt(kEQ_R45*kM_R45_SUC_m_*kM_R45_ubiquinone_6_m_/kM_R45_FUM_m_/kM_R45_ubiquinol_6_m_)*(SUC_m_/kM_R45_SUC_m_)*(ubiquinone_6_m_/kM_R45_ubiquinone_6_m_) - kC_R45/sqrt(kEQ_R45*kM_R45_SUC_m_*kM_R45_ubiquinone_6_m_/kM_R45_FUM_m_/kM_R45_ubiquinol_6_m_)*(FUM_m_/kM_R45_FUM_m_)*(ubiquinol_6_m_/kM_R45_ubiquinol_6_m_))/((1 + SUC_m_/kM_R45_SUC_m_)*(1 + ubiquinone_6_m_/kM_R45_ubiquinone_6_m_) + (1 + FUM_m_/kM_R45_FUM_m_)*(1 + ubiquinol_6_m_/kM_R45_ubiquinol_6_m_) - 1);
    u_R45 = 1; kC_R45 = 1; kEQ_R45 = 1; kM_R45_FUM_m_ = 1; kM_R45_SUC_m_ = 1; kM_R45_ubiquinone_6_m_ = 1; kM_R45_ubiquinol_6_m_ = 1;
  NDI1: NADH_m_ + ubiquinone_6_m_ -> NAD_m_ + ubiquinol_6_m_; u_R46*(kC_R46*sqrt(kEQ_R46*kM_R46_NADH_m_*kM_R46_ubiquinone_6_m_/kM_R46_NAD_m_/kM_R46_ubiquinol_6_m_)*(NADH_m_/kM_R46_NADH_m_)*(ubiquinone_6_m_/kM_R46_ubiquinone_6_m_) - kC_R46/sqrt(kEQ_R46*kM_R46_NADH_m_*kM_R46_ubiquinone_6_m_/kM_R46_NAD_m_/kM_R46_ubiquinol_6_m_)*(NAD_m_/kM_R46_NAD_m_)*(ubiquinol_6_m_/kM_R46_ubiquinol_6_m_))/((1 + NADH_m_/kM_R46_NADH_m_)*(1 + ubiquinone_6_m_/kM_R46_ubiquinone_6_m_) + (1 + NAD_m_/kM_R46_NAD_m_)*(1 + ubiquinol_6_m_/kM_R46_ubiquinol_6_m_) - 1);
    u_R46 = 1; kC_R46 = 1; kEQ_R46 = 1; kM_R46_NAD_m_ = 1; kM_R46_NADH_m_ = 1; kM_R46_ubiquinone_6_m_ = 1; kM_R46_ubiquinol_6_m_ = 1;
  NDE2: NADH_c_ + ubiquinone_6_m_ -> NAD_c_ + ubiquinol_6_m_; u_R47*(kC_R47*sqrt(kEQ_R47*kM_R47_NADH_c_*kM_R47_ubiquinone_6_m_/kM_R47_NAD_c_/kM_R47_ubiquinol_6_m_)*(NADH_c_/kM_R47_NADH_c_)*(ubiquinone_6_m_/kM_R47_ubiquinone_6_m_) - kC_R47/sqrt(kEQ_R47*kM_R47_NADH_c_*kM_R47_ubiquinone_6_m_/kM_R47_NAD_c_/kM_R47_ubiquinol_6_m_)*(NAD_c_/kM_R47_NAD_c_)*(ubiquinol_6_m_/kM_R47_ubiquinol_6_m_))/((1 + NADH_c_/kM_R47_NADH_c_)*(1 + ubiquinone_6_m_/kM_R47_ubiquinone_6_m_) + (1 + NAD_c_/kM_R47_NAD_c_)*(1 + ubiquinol_6_m_/kM_R47_ubiquinol_6_m_) - 1);
    u_R47 = 1; kC_R47 = 1; kEQ_R47 = 1; kM_R47_NAD_c_ = 1; kM_R47_NADH_c_ = 1; kM_R47_ubiquinone_6_m_ = 1; kM_R47_ubiquinol_6_m_ = 1;
  RIP1: ubiquinol_6_m_ + 2 Ferricytochrome_c_m_ + 2 H_m_ -> ubiquinone_6_m_ + 2 Ferrocytochrome_c_m_ + 2 H_i_; u_R48*(kC_R48*sqrt(kEQ_R48*kM_R48_ubiquinol_6_m_*kM_R48_Ferricytochrome_c_m_^2*kM_R48_H_m_^2/kM_R48_ubiquinone_6_m_/kM_R48_Ferrocytochrome_c_m_^2/kM_R48_H_i_^2)*(ubiquinol_6_m_/kM_R48_ubiquinol_6_m_)*(Ferricytochrome_c_m_/kM_R48_Ferricytochrome_c_m_)^2*(H_m_/kM_R48_H_m_)^2 - kC_R48/sqrt(kEQ_R48*kM_R48_ubiquinol_6_m_*kM_R48_Ferricytochrome_c_m_^2*kM_R48_H_m_^2/kM_R48_ubiquinone_6_m_/kM_R48_Ferrocytochrome_c_m_^2/kM_R48_H_i_^2)*(ubiquinone_6_m_/kM_R48_ubiquinone_6_m_)*(Ferrocytochrome_c_m_/kM_R48_Ferrocytochrome_c_m_)^2*(H_i_/kM_R48_H_i_)^2)/((1 + ubiquinol_6_m_/kM_R48_ubiquinol_6_m_)*(1 + Ferricytochrome_c_m_/kM_R48_Ferricytochrome_c_m_)^2*(1 + H_m_/kM_R48_H_m_)^2 + (1 + ubiquinone_6_m_/kM_R48_ubiquinone_6_m_)*(1 + Ferrocytochrome_c_m_/kM_R48_Ferrocytochrome_c_m_)^2*(1 + H_i_/kM_R48_H_i_)^2 - 1);
    u_R48 = 1; kC_R48 = 1; kEQ_R48 = 1; kM_R48_ubiquinone_6_m_ = 1; kM_R48_ubiquinol_6_m_ = 1; kM_R48_Ferricytochrome_c_m_ = 1; kM_R48_Ferrocytochrome_c_m_ = 1; kM_R48_H_m_ = 1; kM_R48_H_i_ = 1;
  COX1: 0.25 O2_c_ + Ferrocytochrome_c_m_ + 2 H_m_ -> Ferricytochrome_c_m_ + H_i_ + 0.5 H2O_m_; u_R49*(kC_R49*sqrt(kEQ_R49*kM_R49_O2_c_^2.5e-1*kM_R49_Ferrocytochrome_c_m_*kM_R49_H_m_^2/kM_R49_Ferricytochrome_c_m_/kM_R49_H_i_/kM_R49_H2O_m_^5e-1)*(O2_c_/kM_R49_O2_c_)^2.5e-1*(Ferrocytochrome_c_m_/kM_R49_Ferrocytochrome_c_m_)*(H_m_/kM_R49_H_m_)^2 - kC_R49/sqrt(kEQ_R49*kM_R49_O2_c_^2.5e-1*kM_R49_Ferrocytochrome_c_m_*kM_R49_H_m_^2/kM_R49_Ferricytochrome_c_m_/kM_R49_H_i_/kM_R49_H2O_m_^5e-1)*(Ferricytochrome_c_m_/kM_R49_Ferricytochrome_c_m_)*(H_i_/kM_R49_H_i_)*(H2O_m_/kM_R49_H2O_m_)^5e-1)/((1 + O2_c_/kM_R49_O2_c_)^2.5e-1*(1 + Ferrocytochrome_c_m_/kM_R49_Ferrocytochrome_c_m_)*(1 + H_m_/kM_R49_H_m_)^2 + (1 + Ferricytochrome_c_m_/kM_R49_Ferricytochrome_c_m_)*(1 + H_i_/kM_R49_H_i_)*(1 + H2O_m_/kM_R49_H2O_m_)^5e-1 - 1);
    u_R49 = 1; kC_R49 = 1; kEQ_R49 = 1; kM_R49_O2_c_ = 1; kM_R49_Ferricytochrome_c_m_ = 1; kM_R49_Ferrocytochrome_c_m_ = 1; kM_R49_H_m_ = 1; kM_R49_H_i_ = 1; kM_R49_H2O_m_ = 1;
  ATP1: 3 H_i_ + ADP_m_ + PI_m_ -> 3 H_m_ + ATP_m_ + H2O_m_; u_R50*(kC_R50*sqrt(kEQ_R50*kM_R50_H_i_^3*kM_R50_ADP_m_*kM_R50_PI_m_/kM_R50_H_m_^3/kM_R50_ATP_m_/kM_R50_H2O_m_)*(H_i_/kM_R50_H_i_)^3*(ADP_m_/kM_R50_ADP_m_)*(PI_m_/kM_R50_PI_m_) - kC_R50/sqrt(kEQ_R50*kM_R50_H_i_^3*kM_R50_ADP_m_*kM_R50_PI_m_/kM_R50_H_m_^3/kM_R50_ATP_m_/kM_R50_H2O_m_)*(H_m_/kM_R50_H_m_)^3*(ATP_m_/kM_R50_ATP_m_)*(H2O_m_/kM_R50_H2O_m_))/((1 + H_i_/kM_R50_H_i_)^3*(1 + ADP_m_/kM_R50_ADP_m_)*(1 + PI_m_/kM_R50_PI_m_) + (1 + H_m_/kM_R50_H_m_)^3*(1 + ATP_m_/kM_R50_ATP_m_)*(1 + H2O_m_/kM_R50_H2O_m_) - 1);
    u_R50 = 1; kC_R50 = 1; kEQ_R50 = 1; kM_R50_H_m_ = 1; kM_R50_H_i_ = 1; kM_R50_ATP_m_ = 1; kM_R50_ADP_m_ = 1; kM_R50_PI_m_ = 1; kM_R50_H2O_m_ = 1;
end
